# OpenSim document version 40000
InverseKinematicsTool default:
  results_directory: ./
  model_file: gait2354_simbodyUNFIXED.osim
  constraint_weight: Inf
  accuracy: 1e-5
  time_range: -Inf Inf
  output_motion_file: ik_result.mot
  report_errors: true
  marker_file: animation.trc
  report_marker_locations: false
  IKTaskSet:
    IKMarkerTask Hips: apply=true weight=1
    IKMarkerTask RightHip: apply=true weight=1
    IKMarkerTask LeftHip: apply=true weight=1
    IKMarkerTask RightKnee: apply=true weight=1
    IKMarkerTask LeftKnee: apply=true weight=1
    IKMarkerTask RightAnkle: apply=true weight=1
    IKMarkerTask LeftAnkle: apply=true weight=1
    IKMarkerTask RightToe: apply=true weight=1
    IKMarkerTask LeftToe: apply=true weight=1
    IKMarkerTask RightToeEnd: apply=true weight=1
    IKMarkerTask LeftToeEnd: apply=true weight=1
    IKMarkerTask Chest: apply=true weight=1
    IKMarkerTask Chest2: apply=true weight=1
    IKMarkerTask Chest3: apply=true weight=1
    IKMarkerTask Chest4: apply=true weight=1
    IKMarkerTask Neck: apply=true weight=1
    IKMarkerTask Head: apply=true weight=1
    IKMarkerTask HeadEnd: apply=true weight=1
    IKMarkerTask RightCollar: apply=true weight=1
    IKMarkerTask LeftCollar: apply=true weight=1
