# OpenSim document version 40000
ScaleTool 3DGaitModel2354-scaled:
  mass: 75.1646 [kg]
  height: -1
  age: -1
  GenericModelMaker:
    model_file: gait2354_simbodyUNFIXED.osim
  ModelScaler:
    apply: true
    marker_file: animation.trc
    time_range: 0 1e-8
    preserve_mass_distribution: true
  MarkerPlacer:
    apply: true
    marker_file: animation.trc
    time_range: 0 1e-8
    output_model_file: model_scaled.osim
    max_marker_movement: -1
    IKTaskSet:
      IKMarkerTask Hips: apply=true weight=1
      IKMarkerTask RightHip: apply=true weight=1
      IKMarkerTask LeftHip: apply=true weight=1
      IKMarkerTask RightKnee: apply=true weight=1
      IKMarkerTask LeftKnee: apply=true weight=1
      IKMarkerTask RightAnkle: apply=true weight=1
      IKMarkerTask LeftAnkle: apply=true weight=1
      IKMarkerTask RightToe: apply=true weight=1
      IKMarkerTask LeftToe: apply=true weight=1
      IKMarkerTask RightToeEnd: apply=true weight=1
      IKMarkerTask LeftToeEnd: apply=true weight=1
      IKMarkerTask Chest: apply=true weight=1
      IKMarkerTask Chest2: apply=true weight=1
      IKMarkerTask Chest3: apply=true weight=1
      IKMarkerTask Chest4: apply=true weight=1
      IKMarkerTask Neck: apply=true weight=1
      IKMarkerTask Head: apply=true weight=1
      IKMarkerTask HeadEnd: apply=true weight=1
      IKMarkerTask RightCollar: apply=true weight=1
      IKMarkerTask LeftCollar: apply=true weight=1
